OpenVSP model (file version 5), 2 components.
Geometry view with OpenVSP parameter names; values to 6 digits, angles in degrees, lengths in the model's unit.
Overall bounding box: X_Min=0.22577 X_Len=40.0782 Y_Min=-31.1368 Y_Len=62.2735 Z_Min=-0.460947 Z_Len=6.26328

Wing "BodyandWing"
  location (X Y Z) 0 0 0, rotation 0 0 0
  symmetric about XZ
  bounding box size 40.0782 62.2735 5.63082
  totals: TotalSpan=63.16 TotalProjectedSpan=62.7382 TotalChord=16.2706 TotalArea=799.451 TotalAR=4.92347 MAC=22.6618
  root: chord 43, twist 5, airfoil file "x y"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 BaseThickChord=0.108217 DeltaY=0.05 ThickChord=0.108217
  sections:
    n  Span  Root_Chord  Tip_Chord  Area     Sweep  Sweep_Location  Dihedral  Twist  Twist_Location  tip airfoil
    1  4.08  43          31.1825    151.332  62     0               0         0      0.25            airfoil file "x y"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 BaseThickChord=0.108217 DeltaY=0.047 ThickChord=0.108217
    2  6.5   31.1825     9          130.593  67     0               0         0      0.25            airfoil file "x y"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 BaseThickChord=0.0685337 DeltaY=0.5 ThickChord=0.0685335
    3  19    9           3          114      37     0               8         0      0.25            airfoil file "x y"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 BaseThickChord=0.0685337 DeltaY=0.8 ThickChord=0.0685335
    4  2     3           0.8        3.8      40     0               9.25      0      0.25            airfoil file "x y"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 BaseThickChord=0.0685337 DeltaY=2 ThickChord=0.0685335

Wing "VStabalizer", child of "BodyandWing"
  location (X Y Z) 34.5 3.93443 2, rotation 74.0984 5.4918 -4.30328
  symmetric about XZ
  bounding box size 4.11234 10.7983 4.16805
  totals: TotalSpan=8.43601 TotalProjectedSpan=8.43601 TotalChord=2.555 TotalArea=21.554 TotalAR=3.30176 MAC=2.73207
  root: chord 3.72, twist 0, NACA 4-series Camber=0 CamberLoc=0.2 ThickChord=0.12
  sections:
    n  Span   Root_Chord  Tip_Chord  Area    Sweep  Sweep_Location  Dihedral  Twist  Twist_Location  tip airfoil
    1  4.218  3.72        1.39       10.777  30     0               0         0      0.25            NACA 4-series Camber=0 CamberLoc=0.2 ThickChord=0.1

VSPAERO settings (reference component "BodyandWing"): Sref=799.451 bref=63.16 cref=16.2706 Xcg=0 Ycg=0 Zcg=0 AlphaStart=2 AlphaEnd=4 AlphaNpts=1 BetaStart=0 BetaEnd=0 BetaNpts=1 MachStart=0.85 MachEnd=1 MachNpts=1 ReCref=1e+08 Vinf=250 Rho=0.000891
